*Heading
** Job name: Job-4 Model name: Model-1-Copy-890000-HighMesh
** Generated by: Abaqus/CAE 2022
*Preprint, echo=NO, model=NO, history=NO, contact=NO
**
** PARTS
**
*Part, name=Composite
*End Part
**
**
** ASSEMBLY
**
*Assembly, name=Assembly
**
*Instance, name=Composite-1, part=Composite
*Node
      1,        32.75,        -8.75,           0.
      2,        32.75,        21.25,           0.
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*Element, type=S3
1, 301, 293, 193
2, 384, 382, 357
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*Element, type=S4
  9,  24, 284, 210,  23
 10, 172,  15,  16, 208
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*Element, type=S4R
510, 625, 626,  23,  22
511,  15,   1, 120, 668
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*Orientation, name=Ori-1
1., 0., 0., 0., 1., 0.
3, 0.
** Region: (CompositeLayup-1-1: Generated From Layup)
*Elset, elset=CompositeLayup-1-1, generate
   1,  501,    1
** Section: CompositeLayup-1-1
*Shell Section, elset=CompositeLayup-1-1, composite, orientation=Ori-1, offset=SPOS, layup=CompositeLayup-1
0.2, 3, Material-1, 0., Ply-1
0.2, 3, Material-1, 0., Ply-1-Copy18
0.2, 3, Material-1, 0., Ply-1-Copy17
0.2, 3, Material-1, 0., Ply-1-Copy16
0.2, 3, Material-1, 0., Ply-1-Copy15
0.2, 3, Material-1, 0., Ply-1-Copy14
0.2, 3, Material-1, 0., Ply-1-Copy13
0.2, 3, Material-1, 0., Ply-1-Copy12
0.2, 3, Material-1, 0., Ply-1-Copy11
0.2, 3, Material-1, 0., Ply-1-Copy10
0.2, 3, Material-1, 0., Ply-1-Copy9
0.2, 3, Material-1, 0., Ply-1-Copy8
0.2, 3, Material-1, 0., Ply-1-Copy7
0.2, 3, Material-1, 0., Ply-1-Copy6
0.2, 3, Material-1, 0., Ply-1-Copy5
0.2, 3, Material-1, 0., Ply-1-Copy4
*Transverse Shear Stiffness
1000., 1000., 0.
*Orientation, name=Ori-2
1., 0., 0., 0., 1., 0.
3, 0.
** Region: (CompositeLayup-1-Simple-1: Generated From Layup)
*Elset, elset=CompositeLayup-1-Simple-1, generate
 502,  734,    1
** Section: CompositeLayup-1-Simple-1
*Shell Section, elset=CompositeLayup-1-Simple-1, composite, orientation=Ori-2, offset=SPOS, layup=CompositeLayup-1-Simple
0.2, 3, Material-Simple, 0., Ply-1
0.2, 3, Material-Simple, 0., Ply-1-Copy18
0.2, 3, Material-Simple, 0., Ply-1-Copy17
0.2, 3, Material-Simple, 0., Ply-1-Copy16
0.2, 3, Material-Simple, 0., Ply-1-Copy15
0.2, 3, Material-Simple, 0., Ply-1-Copy14
0.2, 3, Material-Simple, 0., Ply-1-Copy13
0.2, 3, Material-Simple, 0., Ply-1-Copy12
0.2, 3, Material-Simple, 0., Ply-1-Copy11
0.2, 3, Material-Simple, 0., Ply-1-Copy10
0.2, 3, Material-Simple, 0., Ply-1-Copy9
0.2, 3, Material-Simple, 0., Ply-1-Copy8
0.2, 3, Material-Simple, 0., Ply-1-Copy7
0.2, 3, Material-Simple, 0., Ply-1-Copy6
0.2, 3, Material-Simple, 0., Ply-1-Copy5
0.2, 3, Material-Simple, 0., Ply-1-Copy4
*Transverse Shear Stiffness
1000., 1000., 0.
*End Instance
**
*Nset, nset=Set-6, instance=Composite-1
 11,
*Nset, nset=Set-7, instance=Composite-1
  11,  12, 132, 133, 134, 135, 136, 137, 138, 139, 140, 141, 142, 143, 144, 145
*Elset, elset=Set-7, instance=Composite-1
 530, 534, 535, 545, 553, 555, 558, 559, 570, 600, 601, 605, 606, 614, 649
*Nset, nset=Set-8, instance=Composite-1
   1,   2,  11,  12,  13,  14
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*Elset, elset=Set-8, instance=Composite-1, generate
 502,  734,    1
*Nset, nset=Set-9, instance=Composite-1
 9,
*Nset, nset=Set-10, instance=Composite-1
  11,  12, 132, 133, 134, 135, 136, 137, 138, 139, 140, 141, 142, 143, 144, 145
*Elset, elset=Set-10, instance=Composite-1
 530, 534, 535, 545, 553, 555, 558, 559, 570, 600, 601, 605, 606, 614, 649
*Nset, nset=Set-12, instance=Composite-1
   1,   2,  11,  12,  13,  14
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*Elset, elset=Set-12, instance=Composite-1, generate
 502,  734,    1
*End Assembly
*Amplitude, name=Amp-1, definition=SMOOTH STEP
             0.,              0.,           0.025,              1.,            0.05,              0.,           0.075,             -1.
            0.1,              0.,           0.125,              1.,            0.15,              0.,           0.175,             -1.
            0.2,              0.,           0.225,              1.,            0.25,              0.,           0.275,             -1.
            0.3,              0.,           0.325,              1.,            0.35,              0.,           0.375,             -1.
            0.4,              0.,           0.425,              1.,            0.45,              0.,           0.475,             -1.
            0.5,              0.,           0.525,              1.,            0.55,              0.,           0.575,             -1.
            0.6,              0.,           0.625,              1.,            0.65,              0.,           0.675,             -1.
            0.7,              0.
*Amplitude, name=Periodic, time=TOTAL TIME, definition=PERIODIC
1,            62.8,              0.,              0.
             0.,              1.
**
** MATERIALS
**
*Material, name=Material-1
*Density
 1.6e-09,
*Depvar
     80,
*User Material, constants=1
0.,
*Material, name=Material-Simple
*Density
 7.8e-09,
*Elastic, type=LAMINA
37030.,37000.,  0.29, 2370., 2370., 2370.
*Fail Stress
720.,720.,720.,720.,360.,  0.,  0.
**
** BOUNDARY CONDITIONS
**
** Name: Fixe Type: Symmetry/Antisymmetry/Encastre
*Boundary
Set-12, ENCASTRE
** ----------------------------------------------------------------
**
** STEP: Step-1
**
*Step, name=Step-1, nlgeom=NO
*Static
0.01, 0.1, 1e-06, 0.01
**
** BOUNDARY CONDITIONS
**
** Name: Displacement Type: Displacement/Rotation
*Boundary, amplitude=Periodic
Set-9, 3, 3, 2.
**
** OUTPUT REQUESTS
**
*Restart, write, number interval=1, time marks=NO
**
** FIELD OUTPUT: F-Output-1
**
*Output, field, number interval=20, time marks=NO
*Node Output
CF, RF, U
*Element Output, directions=YES
LE, PE, PEEQ, PEMAG, S, SDV
*Contact Output
CDISP, CSTRESS
**
** HISTORY OUTPUT: H-Output-1
**
*Output, history, variable=PRESELECT
*End Step
** ----------------------------------------------------------------
**
** STEP: Step-2
**
*Step, name=Step-2, nlgeom=NO
*Static
0.01, 0.1, 1e-06, 0.01
**
** OUTPUT REQUESTS
**
*Restart, write, number interval=1, time marks=NO
**
** FIELD OUTPUT: F-Output-1
**
*Output, field, number interval=20, time marks=NO
*Node Output
CF, RF, U
*Element Output, directions=YES
LE, PE, PEEQ, PEMAG, S, SDV
*Contact Output
CDISP, CSTRESS
**
** HISTORY OUTPUT: H-Output-1
**
*Output, history, variable=PRESELECT
*End Step
** ----------------------------------------------------------------
**
** STEP: Step-3
**
*Step, name=Step-3, nlgeom=NO
*Static
0.01, 0.1, 1e-06, 0.01
**
** OUTPUT REQUESTS
**
*Restart, write, number interval=1, time marks=NO
**
** FIELD OUTPUT: F-Output-1
**
*Output, field, number interval=20, time marks=NO
*Node Output
CF, RF, U
*Element Output, directions=YES
LE, PE, PEEQ, PEMAG, S, SDV
*Contact Output
CDISP, CSTRESS
**
** HISTORY OUTPUT: H-Output-1
**
*Output, history, variable=PRESELECT
*End Step
** ----------------------------------------------------------------
**
** STEP: Step-4
**
*Step, name=Step-4, nlgeom=NO
*Static
0.01, 0.1, 1e-06, 0.01
**
** OUTPUT REQUESTS
**
*Restart, write, number interval=1, time marks=NO
**
** FIELD OUTPUT: F-Output-1
**
*Output, field, number interval=20, time marks=NO
*Node Output
CF, RF, U
*Element Output, directions=YES
LE, PE, PEEQ, PEMAG, S, SDV
*Contact Output
CDISP, CSTRESS
**
** HISTORY OUTPUT: H-Output-1
**
*Output, history, variable=PRESELECT
*End Step
** ----------------------------------------------------------------
**
** STEP: Step-5
**
*Step, name=Step-5, nlgeom=NO
*Static
0.01, 0.1, 1e-06, 0.01
**
** OUTPUT REQUESTS
**
*Restart, write, number interval=1, time marks=NO
**
** FIELD OUTPUT: F-Output-1
**
*Output, field, number interval=20, time marks=NO
*Node Output
CF, RF, U
*Element Output, directions=YES
LE, PE, PEEQ, PEMAG, S, SDV
*Contact Output
CDISP, CSTRESS
**
** HISTORY OUTPUT: H-Output-1
**
*Output, history, variable=PRESELECT
*End Step
** ----------------------------------------------------------------
**
** STEP: Step-6
**
*Step, name=Step-6, nlgeom=NO
*Static
0.01, 0.1, 1e-06, 0.01
**
** OUTPUT REQUESTS
**
*Restart, write, number interval=1, time marks=NO
**
** FIELD OUTPUT: F-Output-1
**
*Output, field, number interval=20, time marks=NO
*Node Output
CF, RF, U
*Element Output, directions=YES
LE, PE, PEEQ, PEMAG, S, SDV
*Contact Output
CDISP, CSTRESS
**
** HISTORY OUTPUT: H-Output-1
**
*Output, history, variable=PRESELECT
*End Step
** ----------------------------------------------------------------
**
** STEP: Step-7
**
*Step, name=Step-7, nlgeom=NO
*Static
0.01, 0.1, 1e-06, 0.01
**
** OUTPUT REQUESTS
**
*Restart, write, number interval=1, time marks=NO
**
** FIELD OUTPUT: F-Output-1
**
*Output, field, number interval=20, time marks=NO
*Node Output
CF, RF, U
*Element Output, directions=YES
LE, PE, PEEQ, PEMAG, S, SDV
*Contact Output
CDISP, CSTRESS
**
** HISTORY OUTPUT: H-Output-1
**
*Output, history, variable=PRESELECT
*End Step
** ----------------------------------------------------------------
**
** STEP: Step-8
**
*Step, name=Step-8, nlgeom=NO
*Static
0.01, 0.1, 1e-06, 0.01
**
** OUTPUT REQUESTS
**
*Restart, write, frequency=0
**
** FIELD OUTPUT: F-Output-1
**
*Output, field, number interval=20, time marks=NO
*Node Output
CF, RF, U
*Element Output, directions=YES
LE, PE, PEEQ, PEMAG, S, SDV
*Contact Output
CDISP, CSTRESS
**
** HISTORY OUTPUT: H-Output-1
**
*Output, history, variable=PRESELECT
*End Step
** ----------------------------------------------------------------
**
** STEP: Step-9
**
*Step, name=Step-9, nlgeom=NO
*Static
0.01, 0.1, 1e-06, 0.01
**
** OUTPUT REQUESTS
**
*Restart, write, frequency=0
**
** FIELD OUTPUT: F-Output-1
**
*Output, field, number interval=20, time marks=NO
*Node Output
CF, RF, U
*Element Output, directions=YES
LE, PE, PEEQ, PEMAG, S, SDV
*Contact Output
CDISP, CSTRESS
**
** HISTORY OUTPUT: H-Output-1
**
*Output, history, variable=PRESELECT
*End Step
** ----------------------------------------------------------------
**
** STEP: Step-10
**
*Step, name=Step-10, nlgeom=NO
*Static
0.01, 0.1, 1e-06, 0.01
**
** OUTPUT REQUESTS
**
*Restart, write, frequency=0
**
** FIELD OUTPUT: F-Output-1
**
*Output, field, number interval=20, time marks=NO
*Node Output
CF, RF, U
*Element Output, directions=YES
LE, PE, PEEQ, PEMAG, S, SDV
*Contact Output
CDISP, CSTRESS
**
** HISTORY OUTPUT: H-Output-1
**
*Output, history, variable=PRESELECT
*End Step
** ----------------------------------------------------------------
**
** STEP: Step-11
**
*Step, name=Step-11, nlgeom=NO
*Static
0.01, 0.1, 1e-06, 0.01
**
** OUTPUT REQUESTS
**
*Restart, write, frequency=0
**
** FIELD OUTPUT: F-Output-1
**
*Output, field, number interval=20, time marks=NO
*Node Output
CF, RF, U
*Element Output, directions=YES
LE, PE, PEEQ, PEMAG, S, SDV
*Contact Output
CDISP, CSTRESS
**
** HISTORY OUTPUT: H-Output-1
**
*Output, history, variable=PRESELECT
*End Step
** ----------------------------------------------------------------
**
** STEP: Step-12
**
*Step, name=Step-12, nlgeom=NO
*Static
0.01, 0.1, 1e-06, 0.01
**
** OUTPUT REQUESTS
**
*Restart, write, frequency=0
**
** FIELD OUTPUT: F-Output-1
**
*Output, field, number interval=20, time marks=NO
*Node Output
CF, RF, U
*Element Output, directions=YES
LE, PE, PEEQ, PEMAG, S, SDV
*Contact Output
CDISP, CSTRESS
**
** HISTORY OUTPUT: H-Output-1
**
*Output, history, variable=PRESELECT
*End Step
** ----------------------------------------------------------------
**
** STEP: Step-13
**
*Step, name=Step-13, nlgeom=NO
*Static
0.01, 0.1, 1e-06, 0.01
**
** OUTPUT REQUESTS
**
*Restart, write, frequency=0
**
** FIELD OUTPUT: F-Output-1
**
*Output, field, number interval=20, time marks=NO
*Node Output
CF, RF, U
*Element Output, directions=YES
LE, PE, PEEQ, PEMAG, S, SDV
*Contact Output
CDISP, CSTRESS
**
** HISTORY OUTPUT: H-Output-1
**
*Output, history, variable=PRESELECT
*End Step
** ----------------------------------------------------------------
**
** STEP: Step-14
**
*Step, name=Step-14, nlgeom=NO
*Static
0.01, 0.1, 1e-06, 0.01
**
** OUTPUT REQUESTS
**
*Restart, write, frequency=0
**
** FIELD OUTPUT: F-Output-1
**
*Output, field, number interval=20, time marks=NO
*Node Output
CF, RF, U
*Element Output, directions=YES
LE, PE, PEEQ, PEMAG, S, SDV
*Contact Output
CDISP, CSTRESS
**
** HISTORY OUTPUT: H-Output-1
**
*Output, history, variable=PRESELECT
*End Step
** ----------------------------------------------------------------
**
** STEP: Step-15
**
*Step, name=Step-15, nlgeom=NO
*Static
0.01, 0.1, 1e-06, 0.01
**
** OUTPUT REQUESTS
**
*Restart, write, frequency=0
**
** FIELD OUTPUT: F-Output-1
**
*Output, field, number interval=20, time marks=NO
*Node Output
CF, RF, U
*Element Output, directions=YES
LE, PE, PEEQ, PEMAG, S, SDV
*Contact Output
CDISP, CSTRESS
**
** HISTORY OUTPUT: H-Output-1
**
*Output, history, variable=PRESELECT
*End Step
